OpenVSP model (file version 4), 11 components.
Geometry view with OpenVSP parameter names; values to 6 digits, angles in degrees, lengths in the model's unit.
Overall bounding box: X_Min=0 X_Len=12.3394 Y_Min=-11.063 Y_Len=22.126 Z_Min=-0.381267 Z_Len=3.81297

Blank "Nose"
  location (X Y Z) 0 0 0, rotation 0 0 0

Wing "Horizontal Tail (checked)", child of "Nose"
  location (X Y Z) 10.05 0 0.9, rotation 0 0 0
  symmetric about XZ
  bounding box size 1.56555 5.80898 0.192318
  mass: Density=0 Shell_Flag=1 Mass_Area=4.534 Mass_Prior=3
  totals: TotalSpan=5.6986 TotalProjectedSpan=5.6986 TotalChord=1.09588 TotalArea=6.245
  root: chord 1.56555, twist 0, NACA 4-series Camber=0 CamberLoc=0.2 ThickChord=0.1228
  sections:
    n  Span    Root_Chord  Tip_Chord  Area    Sweep  Sweep_Location  Dihedral  Twist  Twist_Location  tip airfoil
    1  2.8493  1.56555     0.626219   3.1225  0      0.999           0         0      0.25            as above

Fuselage "Fuselage", child of "Nose"
  location (X Y Z) 0 0 0.3, rotation 0 0 0
  bounding box size 12 1.96617 2.26426
  mass: Density=1 Shell_Flag=0 Mass_Area=1 Mass_Prior=1
  Design: Length=12
  cross sections:
    n  XLocPercent  YLocPercent  ZLocPercent  shape
    0  0            0            -0.025       point
    1  0.166667     0            0.0229167    rounded rectangle RoundRectXSec_Radius=0.65 RoundedRect_Height=1.9 RoundedRect_Width=1.8
    2  0.52         0            0.0229167    as above
    3  0.675        0            0.0270833    rounded rectangle RoundRectXSec_Radius=0.5 RoundedRect_Height=1.5 RoundedRect_Width=1.4
    4  1            0            0.0541667    point

Wing "Wing", child of "Nose"
  location (X Y Z) 4.05 0 1.55, rotation 0 4.6 0
  symmetric about XZ
  bounding box size 1.57636 22.126 0.586531
  mass: Density=1 Shell_Flag=0 Mass_Area=1 Mass_Prior=2
  totals: TotalSpan=22.1395 TotalProjectedSpan=22.126 TotalChord=1.1068 TotalArea=24.504
  root: chord 1.58114, twist 0, CST airfoil ContLERad=1 LowDegree=30 ThickChord=0.1 UpDegree=13 Au=[0.34 0.38 0.395 0.37 0.34 0.3 0.32 0.32 0.3 0.28 0.28 0.28 0.28 0.29] Al=[-0.34 0.1475 -0.795 0.555 -0.0675 -0.9 0.475 0.0475 -0.325 -0.3 0.05 -0.21 -0.12 -0.12 -0.11 -0.12 -0.17 -0.165 -0.16 -0.145 -0.145 -0.145 -0.14 -0.14 -0.14 -0.15 -0.2 -0.15 -0.15 -0.35 0]
  sections:
    n  Span     Root_Chord  Tip_Chord  Area    Sweep  Sweep_Location  Dihedral  Twist  Twist_Location  tip airfoil
    1  11.0698  1.58114     0.632456   12.252  0      0.25            2         -2     0.25            as above

Pod "Engine (checked)", child of "Wing"
  location (X Y Z) 3.05888 2.9 1.72257, rotation 2.00615 4.5978 -0.125961; relative location -1.00177 2.9 0.0925308, rotation 1.9997 0.000609049 0.0348977
  symmetric about XZ
  bounding box size 1.99356 6.38355 0.653934
  mass: Density=331 Shell_Flag=0 Mass_Area=1 Mass_Prior=3
  Design: FineRatio=7 Length=2

Custom "Propeller", child of "Engine (checked)"
  location (X Y Z) 3.20854 2.9003 1.71357, rotation 2.00615 4.5978 -0.125961; relative location 0.149896 0.000318743 0.0030179, rotation 0 0 0
  symmetric about XZ
  bounding box size 0.155878 7.74803 1.94117
  mass: Density=0 Shell_Flag=0 Mass_Area=1 Mass_Prior=5
  Design: Diameter=1.93
  custom script Disk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

Wing "VT", child of "Nose"
  location (X Y Z) 8.4 0 1.25, rotation 90 0 -5
  bounding box size 3.93941 0.334103 2.47277
  mass: Density=1 Shell_Flag=0 Mass_Area=1 Mass_Prior=2
  totals: TotalSpan=2.3378 TotalProjectedSpan=2.3378 TotalChord=2.3378 TotalArea=5.4653
  root: chord 3.33971, twist 0, NACA 4-series Camber=0 CamberLoc=0.2 ThickChord=0.1
  sections:
    n  Span    Root_Chord  Tip_Chord  Area    Sweep  Sweep_Location  Dihedral  Twist  Twist_Location  tip airfoil
    1  2.3378  3.33971     1.33588    5.4653  10     0.999           0         0      0.25            as above

Blank "NP"
  location (X Y Z) 4.79 0 0, rotation 0 0 0

Blank "AC"
  location (X Y Z) 4.445 0 0, rotation 0 0 0

Blank "CG 0.19 SM"
  location (X Y Z) 4.567 0 0, rotation 0 0 0

Mesh "MeshGeom"
  location (X Y Z) 0 0 0, rotation 0 0 0
  triangle mesh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

VSPAERO settings: Sref=24.504 bref=22.1395 cref=1.1068 Xcg=4.567 Ycg=0 Zcg=0 AlphaStart=-16 AlphaEnd=16 AlphaNpts=9 BetaStart=0 BetaEnd=0 BetaNpts=1 MachStart=0 MachEnd=0 MachNpts=1
